day := 356
longitude := 131.9551
latitude := 43.1096
zenith := 91
UTCshift := 10
SunRiseSet(day) :=
    lngHour ← longitude/15
    t_rise ← day + (6 - lngHour)/24
    t_set ← day + (18 - lngHour)/24
    M_rise ← 0.9856*t_rise - 3.289
    M_set ← 0.9856*t_set - 3.289
    L_rise ← M_rise + 1.916*sin(π*M_rise/180) + 0.020*sin(2*π*M_rise/180) + 282.634
    L_set ← M_set + 1.916*sin(π*M_set/180) + 0.020*sin(2*π*M_set/180) + 282.634
    L_rise ←
        L_rise - 360 if L_rise ≥ 360
        L_rise + 360 if L_rise < 0
        L_rise otherwise
    L_set  ←
        L_set - 360 if L_set ≥ 360
        L_set + 360 if L_set < 0
        L_set otherwise
    RA_rise ← 180*atan(0.91764*tan(L_rise*π/180))/π
    LQuadrant ← 90*floor(L_rise/90)
    RQuadrant ← 90*floor(RA_rise/90)
    RA_rise ← (RA_rise + (LQuadrant - RQuadrant))/15
    RA_set ← 180*atan(0.91764*tan(L_set*π/180))/π
    LQuadrant ← 90*floor(L_set/90)
    RQuadrant ← 90*floor(RA_set/90)
    RA_set ← (RA_set + (LQuadrant - RQuadrant))/15
    sinDec_rise ← 0.39782*sin(L_rise*π/180)
    sinDec_set ← 0.39782*sin(L_set *π/180)
    cosDec_rise ← cos(asin(sinDec_rise))
    cosDec_set ← cos(asin(sinDec_set))
    cosH_rise ← (cos(zenith*π/180) - sinDec_rise*sin(latitude*π/180))/(cosDec_rise*cos(latitude*π/180))
    cosH_set ← (cos(zenith*π/180) - sinDec_set*sin(latitude*π/180))/(cosDec_set*cos(latitude*π/180))
    H_rise ← (360 - 180*acos(cosH_rise)/π)/15
    H_set ← 180*acos(cosH_set)/π/15
    T_rise ← H_rise + RA_rise - 0.06571*t_rise - 6.622
    T_set ← H_set + RA_set - 0.06571*t_set - 6.622
    RT_rise ← T_rise - lngHour + UTCshift
    RT_rise ←
        RT_rise + 24 if RT_rise < 0
        RT_rise - 24 if RT_rise ≥ 24
        RT_rise otherwise
    RT_set ← T_set - lngHour + UTCshift
    RT_set ←
        RT_set + 24 if RT_set < 0
        RT_set - 24 if RT_set ≥ 24
        RT_set otherwise
    [RT_rise; RT_set]
lngHour := longitude/15 = 8.79701
t_rise := day + (6 - lngHour)/24 = 355.883
M_rise := 0.9856*t_rise - 3.289 = 347.47
L_rise := M_rise + 1.916*sin(π*M_rise/180) + 0.020*sin(2*π*M_rise/180) + 282.634 = 629.68
L_rise :=
    L_rise - 360 if L_rise ≥ 360
    L_rise + 360 if L_rise < 0
    L_rise otherwise
    = 269.68
RA_rise := 180*atan(0.91764*tan(L_rise*π/180))/π = 89.6508
LQuadrant := 90*floor(L_rise/90) = 180
RQuadrant := 90*floor(RA_rise/90) = 0
RA_rise := (RA_rise + (LQuadrant - RQuadrant))/15 = 17.9767
sinDec_rise := 0.39782*sin(L_rise*π/180) = -0.397814
cosDec_rise := cos(asin(sinDec_rise)) = 0.917466
cosH_rise := (cos(zenith*π/180) - sinDec_rise*sin(latitude*π/180))/(cosDec_rise*cos(latitude*π/180)) = 0.379836
H_rise := (360 - 180*acos(cosH_rise)/π)/15 = 19.4882
T_rise := H_rise + RA_rise - 0.06571*t_rise - 6.622 = 7.45785
RT_rise := T_rise - lngHour + UTCshift = 8.66085
RT_rise :=
    RT_rise + 24 if RT_rise < 0
    RT_rise - 24 if RT_rise ≥ 24
    RT_rise otherwise
    = 8.66085
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